twist_wing
#AVL input file written by avlwrapper 0.4.0

#Mach
0.0
#iYsym iZsym Zsym
0 0 0.0
#Sref Cref Bref
0.125 0.125 1
#Xref Yref Zref
0 0 0
0.0

SURFACE
wing
#NChordwise ChordSpacing NSpanwise SpanSpacing
3 0.0 5 0.0
YDUPLICATE
0.0
SECTION
#Xle Yle Zle Chord Angle
0 0 0 0.125 0.0
NACA
0012
SECTION
#Xle Yle Zle Chord Angle
0 0.5 0.043744331762962003 0.125 0.0
NACA
0012
